# OpenSim document version 30000
# Name of the .osim file used to construct a model.
# Replace the model's force set with sets specified in <force_set_files>? If false, the force set is appended to.
# List of xml files used to construct an force set for the model.
# Directory used for writing results.
# Output precision.  It is 8 by default.
# Initial time for the simulation.
# Final time for the simulation.
# Flag indicating whether or not to compute equilibrium values for states other than the coordinates or speeds.  For example, equilibrium muscle fiber lengths or muscle forces.
# Maximum number of integrator steps.
# Maximum integration step size.
# Minimum integration step size.
# Integrator error tolerance. When the error is greater, the integrator step size is decreased.
# Set of analyses to be run during the investigation.
# Controller objects in the model.
# XML file (.xml) containing the forces applied to the model as ExternalLoads.
# Storage file (.sto) containing the initial states for the forward simulation. This file often contains multiple rows of data, each row being a time-stamped array of states. The first column contains the time.  The rest of the columns contain the states in the order appropriate for the model. In a storage file, unlike a motion file (.mot), non-uniform time spacing is allowed.  If the user-specified initial time for a simulation does not correspond exactly to one of the time stamps in this file, inerpolation is NOT used because it is usually necessary to being a simulation from an exact set of states.  Instead, the closest earlier set of states is used. Having a states file that contains the entire trajectory of a simulations allows for corrective springs for perturbation analysis to be added.
# Flag (true or false) indicating whether or not the integrator should use a particular time stepping.  If true, the time stepping is extracted from the initial states file.  In this situation, therefore, the initial states file must contain all the time steps in a simulation and be written out to high precision (usually 20 decimal places).  Setting this flag to true can be useful when reproducing a previous forward simulation with as little drift as possible.  If this flag is false, the integrator is left to determine its own time stepping.
model_file
replace_force_set:
  false
force_set_files
results_directory:
  .
output_precision:
  8
initial_time:
  0
final_time:
  1
solve_for_equilibrium_for_auxiliary_states:
  true
maximum_number_of_integrator_steps:
  20000
maximum_integrator_step_size:
  1
minimum_integrator_step_size:
  1e-8
integrator_error_tolerance:
  1e-5
AnalysisSet Analyses
ControllerSet Controllers:
  ControlSetController
external_loads_file
use_specified_dt:
  false
